<neuroml xmlns="http://www.neuroml.org/schema/neuroml2"  xmlns:xs="http://www.w3.org/2001/XMLSchema" xmlns:xsi="http://www.w3.org/2001/XMLSchema-instance" xsi:schemaLocation="http://www.neuroml.org/schema/neuroml2 https://raw.github.com/NeuroML/NeuroML2/development/Schemas/NeuroML2/NeuroML_v2.3.1.xsd" id="BrunelFromPyNN">
    <notes>
    This NeuroML 2 file has been generated from:
        PyNN v0.11.0
        libNeuroML v0.6.3
        pyNeuroML v1.3.7
    </notes>
    <IF_curr_alpha id="IF_curr_alpha_E_net" cm="0.001" i_offset="0.0" tau_syn_E="0.1" tau_syn_I="0.1" v_init="0.0" tau_m="20.0" tau_refrac="2.0" v_reset="0.0" v_rest="0.0" v_thresh="20.0"/>
    <IF_curr_alpha id="IF_curr_alpha_I_net" cm="0.001" i_offset="0.0" tau_syn_E="0.1" tau_syn_I="0.1" v_init="0.0" tau_m="20.0" tau_refrac="2.0" v_reset="0.0" v_rest="0.0" v_thresh="20.0"/>
    <alphaCurrSynapse id="syn__E_net__TO__E_net" tau_syn="0.1"/>
    <alphaCurrSynapse id="syn__I_net__TO__E_net" tau_syn="0.1"/>
    <alphaCurrSynapse id="syn__expoisson__TO__E_net" tau_syn="0.1"/>
    <alphaCurrSynapse id="syn__E_net__TO__I_net" tau_syn="0.1"/>
    <alphaCurrSynapse id="syn__I_net__TO__I_net" tau_syn="0.1"/>
    <alphaCurrSynapse id="syn__inpoisson__TO__I_net" tau_syn="0.1"/>
    <SpikeSourcePoisson id="SpikeSourcePoisson_expoisson" start="0.0ms" duration="10000000000.0ms" rate="10000.0Hz"/>
    <SpikeSourcePoisson id="SpikeSourcePoisson_inpoisson" start="0.0ms" duration="10000000000.0ms" rate="10000.0Hz"/>
    <network id="BrunelFromPyNN">
        <population id="E_net" component="IF_curr_alpha_E_net" size="20" type="populationList">
            <property tag="radius" value="5"/>
            <property tag="type" value="E"/>
            <instance id="0">
                <location x="0.0" y="0.0" z="0.0"/>
            </instance>
            <instance id="1">
                <location x="1.0" y="0.0" z="0.0"/>
            </instance>
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        </population>
        <population id="I_net" component="IF_curr_alpha_I_net" size="5" type="populationList">
            <property tag="radius" value="5"/>
            <property tag="type" value="I"/>
            <instance id="0">
                <location x="0.0" y="0.0" z="0.0"/>
            </instance>
            <instance id="1">
                <location x="1.0" y="0.0" z="0.0"/>
            </instance>
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        </population>
        <population id="expoisson" component="SpikeSourcePoisson_expoisson" size="20" type="populationList">
            <property tag="radius" value="3"/>
            <property tag="type" value="E"/>
            <instance id="0">
                <location x="0.0" y="0.0" z="0.0"/>
            </instance>
            <instance id="1">
                <location x="1.0" y="0.0" z="0.0"/>
            </instance>
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        </population>
        <population id="inpoisson" component="SpikeSourcePoisson_inpoisson" size="5" type="populationList">
            <property tag="radius" value="3"/>
            <property tag="type" value="E"/>
            <instance id="0">
                <location x="0.0" y="0.0" z="0.0"/>
            </instance>
            <instance id="1">
                <location x="1.0" y="0.0" z="0.0"/>
            </instance>
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        </population>
        <projection id="E_net__TO__E_net" presynapticPopulation="E_net" postsynapticPopulation="E_net" synapse="syn__E_net__TO__E_net">
            <connectionWD id="0" preCellId="../E_net/5/IF_curr_alpha_E_net" postCellId="../E_net/0/IF_curr_alpha_E_net" weight="0.000413635066326" delay="1.5ms"/>
            <connectionWD id="1" preCellId="../E_net/6/IF_curr_alpha_E_net" postCellId="../E_net/0/IF_curr_alpha_E_net" weight="0.000413635066326" delay="1.5ms"/>
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        </projection>
        <projection id="I_net__TO__E_net" presynapticPopulation="I_net" postsynapticPopulation="E_net" synapse="syn__I_net__TO__E_net">
            <connectionWD id="0" preCellId="../I_net/0/IF_curr_alpha_I_net" postCellId="../E_net/1/IF_curr_alpha_E_net" weight="-0.001654540265306" delay="1.5ms"/>
            <connectionWD id="1" preCellId="../I_net/1/IF_curr_alpha_I_net" postCellId="../E_net/1/IF_curr_alpha_E_net" weight="-0.001654540265306" delay="1.5ms"/>
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        </projection>
        <projection id="expoisson__TO__E_net" presynapticPopulation="expoisson" postsynapticPopulation="E_net" synapse="syn__expoisson__TO__E_net">
            <connectionWD id="0" preCellId="../expoisson/0/SpikeSourcePoisson_expoisson" postCellId="../E_net/0/IF_curr_alpha_E_net" weight="0.000413635066326" delay="0.025ms"/>
            <connectionWD id="1" preCellId="../expoisson/1/SpikeSourcePoisson_expoisson" postCellId="../E_net/1/IF_curr_alpha_E_net" weight="0.000413635066326" delay="0.025ms"/>
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        </projection>
        <projection id="E_net__TO__I_net" presynapticPopulation="E_net" postsynapticPopulation="I_net" synapse="syn__E_net__TO__I_net">
            <connectionWD id="0" preCellId="../E_net/5/IF_curr_alpha_E_net" postCellId="../I_net/0/IF_curr_alpha_I_net" weight="0.000413635066326" delay="1.5ms"/>
            <connectionWD id="1" preCellId="../E_net/6/IF_curr_alpha_E_net" postCellId="../I_net/0/IF_curr_alpha_I_net" weight="0.000413635066326" delay="1.5ms"/>
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        </projection>
        <projection id="I_net__TO__I_net" presynapticPopulation="I_net" postsynapticPopulation="I_net" synapse="syn__I_net__TO__I_net">
            <connectionWD id="0" preCellId="../I_net/0/IF_curr_alpha_I_net" postCellId="../I_net/1/IF_curr_alpha_I_net" weight="-0.001654540265306" delay="1.5ms"/>
            <connectionWD id="1" preCellId="../I_net/1/IF_curr_alpha_I_net" postCellId="../I_net/1/IF_curr_alpha_I_net" weight="-0.001654540265306" delay="1.5ms"/>
            <connectionWD id="2" preCellId="../I_net/0/IF_curr_alpha_I_net" postCellId="../I_net/3/IF_curr_alpha_I_net" weight="-0.001654540265306" delay="1.5ms"/>
            <connectionWD id="3" preCellId="../I_net/3/IF_curr_alpha_I_net" postCellId="../I_net/4/IF_curr_alpha_I_net" weight="-0.001654540265306" delay="1.5ms"/>
        </projection>
        <projection id="inpoisson__TO__I_net" presynapticPopulation="inpoisson" postsynapticPopulation="I_net" synapse="syn__inpoisson__TO__I_net">
            <connectionWD id="0" preCellId="../inpoisson/0/SpikeSourcePoisson_inpoisson" postCellId="../I_net/0/IF_curr_alpha_I_net" weight="0.000413635066326" delay="0.025ms"/>
            <connectionWD id="1" preCellId="../inpoisson/1/SpikeSourcePoisson_inpoisson" postCellId="../I_net/1/IF_curr_alpha_I_net" weight="0.000413635066326" delay="0.025ms"/>
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        </projection>
    </network>
</neuroml>
